# OpenSim document version 40000
ControlSet Rajagopal_CMC_ControlConstraints:
  defaults: ControlLinear default: is_model_control=true extrapolate=true default_min=0.02 default_max=1
      filter_on=false use_steps=true kp=100 kv=20
  ControlLinear [values shared by the 117 below unless stated]: is_model_control=true extrapolate=true filter_on=false
      kp=100 kv=20 use_steps=true default_max=1
  ControlLinear FX.excitation: default_min=-1000 default_max=1000 use_steps=false
  ControlLinear FY.excitation: default_min=-1000 default_max=1000 use_steps=false
  ControlLinear FZ.excitation: default_min=-1000 default_max=1000 use_steps=false
  ControlLinear MX.excitation: default_min=-1000 default_max=1000 use_steps=false
  ControlLinear MY.excitation: default_min=-1000 default_max=1000 use_steps=false
  ControlLinear MZ.excitation: default_min=-1000 default_max=1000 use_steps=false
  ControlLinear reserve_hip_flexion_r.excitation: default_min=-1000 default_max=1000
  ControlLinear reserve_hip_adduction_r.excitation: default_min=-1000 default_max=1000
  ControlLinear reserve_hip_rotation_r.excitation: default_min=-1000 default_max=1000
  ControlLinear reserve_knee_angle_r.excitation: default_min=-1000 default_max=1000
  ControlLinear reserve_ankle_angle_r.excitation: default_min=-1000 default_max=1000
  ControlLinear reserve_subtalar_angle_r.excitation: default_min=-1000 default_max=1000
  ControlLinear reserve_mtp_angle_r.excitation: default_min=-1
  ControlLinear reserve_hip_flexion_l.excitation: default_min=-1000 default_max=1000
  ControlLinear reserve_hip_adduction_l.excitation: default_min=-1000 default_max=1000
  ControlLinear reserve_hip_rotation_l.excitation: default_min=-1000 default_max=1000
  ControlLinear reserve_knee_angle_l.excitation: default_min=-1000 default_max=1000
  ControlLinear reserve_ankle_angle_l.excitation: default_min=-1000 default_max=1000
  ControlLinear reserve_subtalar_angle_l.excitation: default_min=-1000 default_max=1000
  ControlLinear reserve_mtp_angle_l.excitation: default_min=-1
  ControlLinear lumbar_extension.excitation: default_min=-1000 default_max=1000
  ControlLinear lumbar_bending.excitation: default_min=-1000 default_max=1000
  ControlLinear lumbar_rotation.excitation: default_min=-1000 default_max=1000
  ControlLinear arm_flex_r.excitation: default_min=-1000 default_max=1000
  ControlLinear arm_add_r.excitation: default_min=-1000 default_max=1000
  ControlLinear arm_rot_r.excitation: default_min=-1000 default_max=1000
  ControlLinear elbow_flex_r.excitation: default_min=-1000 default_max=1000
  ControlLinear pro_sup_r.excitation: default_min=-1000 default_max=1000
  ControlLinear wrist_flex_r.excitation: default_min=-1000 default_max=1000
  ControlLinear wrist_dev_r.excitation: default_min=-1000 default_max=1000
  ControlLinear arm_flex_l.excitation: default_min=-1000 default_max=1000
  ControlLinear arm_add_l.excitation: default_min=-1000 default_max=1000
  ControlLinear arm_rot_l.excitation: default_min=-1000 default_max=1000
  ControlLinear elbow_flex_l.excitation: default_min=-1000 default_max=1000
  ControlLinear pro_sup_l.excitation: default_min=-1000 default_max=1000
  ControlLinear wrist_flex_l.excitation: default_min=-1000 default_max=1000
  ControlLinear wrist_dev_l.excitation: default_min=-1000 default_max=1000
  ControlLinear addbrev_r.excitation: default_min=0.02
  ControlLinear addlong_r.excitation: default_min=0.02
  ControlLinear addmagDist_r.excitation: default_min=0.02
  ControlLinear addmagIsch_r.excitation: default_min=0.02
  ControlLinear addmagMid_r.excitation: default_min=0.02
  ControlLinear addmagProx_r.excitation: default_min=0.02
  ControlLinear bflh_r.excitation: default_min=0.02
  ControlLinear bfsh_r.excitation: default_min=0.02
  ControlLinear edl_r.excitation: default_min=0.02
  ControlLinear ehl_r.excitation: default_min=0.02
  ControlLinear fdl_r.excitation: default_min=0.02
  ControlLinear fhl_r.excitation: default_min=0.02
  ControlLinear gaslat_r.excitation: default_min=0.02
  ControlLinear gasmed_r.excitation: default_min=0.02
  ControlLinear glmax1_r.excitation: default_min=0.02
  ControlLinear glmax2_r.excitation: default_min=0.02
  ControlLinear glmax3_r.excitation: default_min=0.02
  ControlLinear glmed1_r.excitation: default_min=0.02
  ControlLinear glmed2_r.excitation: default_min=0.02
  ControlLinear glmed3_r.excitation: default_min=0.02
  ControlLinear glmin1_r.excitation: default_min=0.02
  ControlLinear glmin2_r.excitation: default_min=0.02
  ControlLinear glmin3_r.excitation: default_min=0.02
  ControlLinear grac_r.excitation: default_min=0.02
  ControlLinear iliacus_r.excitation: default_min=0.02
  ControlLinear perbrev_r.excitation: default_min=0.02
  ControlLinear perlong_r.excitation: default_min=0.02
  ControlLinear piri_r.excitation: default_min=0.02
  ControlLinear psoas_r.excitation: default_min=0.02
  ControlLinear recfem_r.excitation: default_min=0.02
  ControlLinear sart_r.excitation: default_min=0.02
  ControlLinear semimem_r.excitation: default_min=0.02
  ControlLinear semiten_r.excitation: default_min=0.02
  ControlLinear soleus_r.excitation: default_min=0.02
  ControlLinear tfl_r.excitation: default_min=0.02
  ControlLinear tibant_r.excitation: default_min=0.02
  ControlLinear tibpost_r.excitation: default_min=0.02
  ControlLinear vasint_r.excitation: default_min=0.02
  ControlLinear vaslat_r.excitation: default_min=0.02
  ControlLinear vasmed_r.excitation: default_min=0.02
  ControlLinear addbrev_l.excitation: default_min=0.02
  ControlLinear addlong_l.excitation: default_min=0.02
  ControlLinear addmagDist_l.excitation: default_min=0.02
  ControlLinear addmagIsch_l.excitation: default_min=0.02
  ControlLinear addmagMid_l.excitation: default_min=0.02
  ControlLinear addmagProx_l.excitation: default_min=0.02
  ControlLinear bflh_l.excitation: default_min=0.02
  ControlLinear bfsh_l.excitation: default_min=0.02
  ControlLinear edl_l.excitation: default_min=0.02
  ControlLinear ehl_l.excitation: default_min=0.02
  ControlLinear fdl_l.excitation: default_min=0.02
  ControlLinear fhl_l.excitation: default_min=0.02
  ControlLinear gaslat_l.excitation: default_min=0.02
  ControlLinear gasmed_l.excitation: default_min=0.02
  ControlLinear glmax1_l.excitation: default_min=0.02
  ControlLinear glmax2_l.excitation: default_min=0.02
  ControlLinear glmax3_l.excitation: default_min=0.02
  ControlLinear glmed1_l.excitation: default_min=0.02
  ControlLinear glmed2_l.excitation: default_min=0.02
  ControlLinear glmed3_l.excitation: default_min=0.02
  ControlLinear glmin1_l.excitation: default_min=0.02
  ControlLinear glmin2_l.excitation: default_min=0.02
  ControlLinear glmin3_l.excitation: default_min=0.02
  ControlLinear grac_l.excitation: default_min=0.02
  ControlLinear iliacus_l.excitation: default_min=0.02
  ControlLinear perbrev_l.excitation: default_min=0.02
  ControlLinear perlong_l.excitation: default_min=0.02
  ControlLinear piri_l.excitation: default_min=0.02
  ControlLinear psoas_l.excitation: default_min=0.02
  ControlLinear recfem_l.excitation: default_min=0.02
  ControlLinear sart_l.excitation: default_min=0.02
  ControlLinear semimem_l.excitation: default_min=0.02
  ControlLinear semiten_l.excitation: default_min=0.02
  ControlLinear soleus_l.excitation: default_min=0.02
  ControlLinear tfl_l.excitation: default_min=0.02
  ControlLinear tibant_l.excitation: default_min=0.02
  ControlLinear tibpost_l.excitation: default_min=0.02
  ControlLinear vasint_l.excitation: default_min=0.02
  ControlLinear vaslat_l.excitation: default_min=0.02
  ControlLinear vasmed_l.excitation: default_min=0.02
